New RegControl.sb9_p17uhs13_1247_reg_264 transformer=sb9_p17uhs13_1247_trans_264 winding=2 ptratio=60.0 band=1.9919999999999998 vreg = 123.60000000000001

New RegControl.sb9_p17uhs13_1247_reg_263 transformer=sb9_p17uhs13_1247_trans_263 winding=2 ptratio=60.0 band=1.9919999999999998 vreg = 123.60000000000001
