New Storage.storage_sb9_p17uhs13_1247_node_9_17 phases=3 bus1=sb9_p17uhs13_1247_node_9_17.1.2.3 kV=12.47 kVA=1100.0 kWRated=1000.0 kWhRated=2000.0 kWhStored=1000.0 State=IDLING %EffCharge=95.0 %EffDischarge=95.0
New Storage.storage_sb9_p17uhs13_1247_node_9_18 phases=3 bus1=sb9_p17uhs13_1247_node_9_18.1.2.3 kV=12.47 kVA=1100.0 kWRated=1000.0 kWhRated=2000.0 kWhStored=1000.0 State=IDLING %EffCharge=95.0 %EffDischarge=95.0
New Storage.storage_sb9_p17uhs13_1247_node_9_18_1 phases=3 bus1=sb9_p17uhs13_1247_node_9_18.1.2.3 kV=12.47 kVA=1100.0 kWRated=1000.0 kWhRated=2000.0 kWhStored=1000.0 State=IDLING %EffCharge=95.0 %EffDischarge=95.0
