New Capacitor.p17uc76 bus1=p17udt15013 phases=3 Kv=12.47 conn=Wye Kvar=300.0

New CapControl.p17uc76 Capacitor=p17uc76 Element=Line.l(r:p17udt15013-p17udt15104) Terminal=1 delay=100.0 Type=voltage Vmin=120.5 Vmax=125.0 Ptratio=59.99631547328862 Ctratio=100.0
