New Capacitor.p17uc72 bus1=p17udt6086 phases=3 Kv=12.47 conn=Wye Kvar=450.0

New CapControl.p17uc72 Capacitor=p17uc72 Element=Line.padswitch(r:p17udt6041-p17udt6086)p17u_47597 Terminal=1 delay=100.0 Type=voltage Vmin=120.5 Vmax=125.0 Ptratio=59.99631547328862 Ctratio=100.0

New Capacitor.p17uc77 bus1=p17udt8251 phases=3 Kv=12.47 conn=Wye Kvar=300.0

New CapControl.p17uc77 Capacitor=p17uc77 Element=Line.l(r:p17udt8251-p17udt8376) Terminal=1 delay=100.0 Type=voltage Vmin=120.5 Vmax=125.0 Ptratio=59.99631547328862 Ctratio=100.0
