New Capacitor.p17uc75 bus1=p17udt9323 phases=3 Kv=12.47 conn=Wye Kvar=300.0

New CapControl.p17uc75 Capacitor=p17uc75 Element=Line.l(r:p17udt9323-p17udt9361) Terminal=1 delay=100.0 Type=voltage Vmin=120.5 Vmax=125.0 Ptratio=59.99631547328862 Ctratio=100.0

New Capacitor.p17uc78 bus1=p17udt1730 phases=3 Kv=12.47 conn=Wye Kvar=300.0

New CapControl.p17uc78 Capacitor=p17uc78 Element=Line.l(r:p17udt1730-p17udt1734) Terminal=1 delay=100.0 Type=voltage Vmin=120.5 Vmax=125.0 Ptratio=59.99631547328862 Ctratio=100.0
